// SBML level 2 version 4

model Topp2000_BetaCellMass_Diabetes()
  // This model is from the article:
  // A model of beta-cell mass, insulin, and glucose kinetics: pathways to diabetes.
  // Topp B, Promislow K, deVries G, Miura RM, Finegood DT. J Theor Biol.2000 Oct 21;206(4):605-19. 11013117,
  // Abstract:
  // Diabetes is a disease of the glucose regulatory system that is associated with increased morbidity and early mortality. The primary variables of this system are beta-cell mass, plasma insulin concentrations, and plasma glucose concentrations. Existing mathematical models of glucose regulation incorporate only glucose and/or insulin dynamics. Here we develop a novel model of beta -cell mass, insulin, and glucose dynamics, which consists of a system of three nonlinear ordinary differential equations, where glucose and insulin dynamics are fast relative to beta-cell mass dynamics. For normal parameter values, the model has two stable fixed points (representing physiological and pathological steady states), separated on a slow manifold by a saddle point. Mild hyperglycemia leads to the growth of the beta -cell mass (negative feedback) while extreme hyperglycemia leads to the reduction of the beta-cell mass (positive feedback). The model predicts that there are three pathways in prolonged hyperglycemia: (1) the physiological fixed point can be shifted to a hyperglycemic level (regulated hyperglycemia), (2) the physiological and saddle points can be eliminated (bifurcation), and (3) progressive defects in glucose and/or insulin dynamics can drive glucose levels up at a rate faster than the adaptation of the beta -cell mass which can drive glucose levels down (dynamical hyperglycemia).
  // biomodels.db:MODEL1106270000
  // biomodels.db:BIOMD0000000341
  // isDescribedBy pubmed:11013117
  // hasTaxon taxonomy:9606
  // isVersionOf GO:0061178
  // hasProperty mamo:MAMO_0000046

  // Compartments:
  compartment cell = 1;

  // Species:
  species $G in cell = 250; G is "glucose";  // isVersionOf CHEBI:17234 kegg.compound:C00293
  species $I in cell = 2.8; I is "insulin";  // isVersionOf uniprot:P01308
  species $B in cell = 37; B is "Mass";  // isVersionOf BTO:0000783; occursIn BTO:0000991

  // Parameters:
  si = 0.72;
  Eg0 = 1.44;
  R0 = 864;
  sigma = 43.2;
  alpha = 20000;
  k = 432;
  d0 = 0.06;
  r1 = 0.00084;
  r2 = 2.4e-6;

  // Rate rules:
  G' = R0 - (Eg0 + si*I)*G;
  I' = B*sigma*G^2/(alpha + G^2) - k*I;
  B' = (-d0 + r1*G - r2*G^2)*B;
end
